# Set output directory

variable out_number string 15g

### BACKUP SIMULATION FILES

variable gamma_factor equal 1822.888483

variable outputdir string hedp_SPH_H_ground_${out_number}
shell mkdir /data/tcampbell/LAMMPS/SPH_Bohm/${outputdir}/
shell cp ~/fresh_lammps-3Mar20/lammps-3Mar20/SPH_Bohm/in.hedp_SPH_H_ground_${out_number} /data/tcampbell/LAMMPS/SPH_Bohm/${outputdir}/
shell cp ~/fresh_lammps-3Mar20/lammps-3Mar20/src/pair_bohm_SPH_dynamic.cpp /data/tcampbell/LAMMPS/SPH_Bohm/${outputdir}/
shell cp ~/fresh_lammps-3Mar20/lammps-3Mar20/src/pair_bohm_SPH_dynamic.h /data/tcampbell/LAMMPS/SPH_Bohm/${outputdir}/
shell cp ~/fresh_lammps-3Mar20/lammps-3Mar20/src/pair_coul_long_SPH_ph.cpp /data/tcampbell/LAMMPS/SPH_Bohm/${outputdir}/
shell cp ~/fresh_lammps-3Mar20/lammps-3Mar20/src/pair_coul_long_SPH_ph.h /data/tcampbell/LAMMPS/SPH_Bohm/${outputdir}/
log /data/tcampbell/LAMMPS/SPH_Bohm/${outputdir}/log.${outputdir}

### SYSTEM PARAMETERS:

### physical parameters:

variable temp equal 0.000	         # temperature in Ev
variable ion_density equal 0.044545217  		# Density in # per bohr^3
variable num_ions equal 1	                                        # Number of ions
variable ion_charge equal 1.0			                                # Average charge/ionization
variable ion_amu equal 1.008	                                # Atomic mass of ion
variable electron_amu equal 0.00054857991                           # Atomic mass of electrons

variable sigma_start equal 0.6                                         # Start global packet width of electrons in bohr

variable elements_per_electron equal 128

variable element_scaled_mass equal ${electron_amu}/${elements_per_electron}
variable element_scaled_charge equal -1/${elements_per_electron}

variable num_electrons equal ${num_ions}*${ion_charge}
variable num_electron_elements equal ${num_electrons}*${elements_per_electron}
variable half_num_electrons equal ${num_electrons}/2.0
variable quar_num_electrons equal ${half_num_electrons}/2.0
variable temptouse equal 11604.5221*${temp}
# variable box_len equal (${num_ions}/${ion_density})^(1/3)
variable box_len equal 2.0
variable half_box_len equal ${box_len}/2.0

variable confine_strength equal 0.0        # set strength of qudratic confinement potential for SPH elements belonging to the same electron

### simulation parameters:

variable cutoff equal 6.0                                     # cutoff for pairwise calculations

variable assign_ion equal 1    # if set to 1, all ions moved to targ coord on first timestep
variable targ_coord equal ${half_box_len}

units electron                                                      # use electron units (Hartree)
newton on
boundary s s s
atom_style SPH_CoM

# Pair style string selection

variable pair_name string bohm_SPH_dynamic_Mocz_rob_ftwo

variable ion_seed equal 1
variable e_up_a_seed equal 2
variable e_up_b_seed equal 3
variable e_down_a_seed equal 4
variable e_down_b_seed equal 5

# thermostat parameters

variable ion_vel_seed equal 6
variable e_down_a_vel_seed equal 7
variable e_down_b_vel_seed equal 8
variable e_up_a_vel_seed equal 9
variable e_up_b_vel_seed equal 10

variable vel_t equal 1.0*${temptouse}

# rdf calculation

variable rdf_num_bins equal 150
variable rdf_num_measurements equal 10
variable rdf_output_time_step equal 40
variable rdf_measurement_time_gap equal 1

### Setup simulation

region bounding_region block 0.0 ${box_len} 0.0 ${box_len} 0.0 ${box_len}

create_box 2 bounding_region

create_atoms 1 random ${num_ions} ${ion_seed} NULL
group ion type 1
mass 1 ${ion_amu}
set type 1 charge ${ion_charge}

create_atoms 2 random ${num_electron_elements} ${e_up_a_seed} NULL
group electron type 2
mass 2 ${element_scaled_mass}
set type 2 charge ${element_scaled_charge}

variable tag_ele_start equal ${num_ions}+1

# Ensure ghost atom velocities communicated for SPH Bohm Potential:

comm_modify vel yes

### Dynamic Width fix
variable dens_wid_const equal 1.3
variable N_iter equal 10
variable mix_fact equal 1.0
variable tfwhm equal 4.70964*${dens_wid_const}*${box_len}/(${num_electron_elements}^(1/3))
variable type_avoid equal 1 #ensure ions are not included in SPH loops (must match ion type)

# Call dynamic_widths_com to ensure calculation of electron Centres of Mass

fix ele_dyn_wid electron dynamic_widths_com ${dens_wid_const} ${N_iter} ${mix_fact} ${sigma_start} ${cutoff} ${box_len} ${type_avoid} ${num_electrons} ${elements_per_electron} ${tag_ele_start} ${pair_name}

pair_style hybrid/overlay ${pair_name} ${cutoff} ${gamma_factor} coul/cut/SPH_nopseudo_sub ${cutoff} 1.0 1 ${elements_per_electron} ${tag_ele_start} ${assign_ion} ${targ_coord}

# Set up each pair with the correct styles:

pair_coeff * * coul/cut/SPH_nopseudo_sub

pair_coeff 2 2 ${pair_name}

# increase number of allowed neighbours
neigh_modify one 10000

velocity all create ${temptouse} ${ion_vel_seed} &
rot yes dist gaussian

#velocity ion create ${temptouse} ${ion_vel_seed} &
#rot yes dist gaussian

#velocity electron create ${vel_t} ${e_down_a_vel_seed} &
#rot yes dist gaussian

# Randomize the starting positions of all of our particles

displace_atoms all random 0.1 0.1 0.1 42

compute electron_temp electron temp

# Compute pair correlation functions:
compute ion_electron_rdf all rdf ${rdf_num_bins} &
1 2

compute electron_electron_rdf all rdf ${rdf_num_bins} &
2 2

fix write_ion_electron_rdf all ave/time &
${rdf_measurement_time_gap} ${rdf_num_measurements} ${rdf_output_time_step} &
c_ion_electron_rdf[*] file &
/data/tcampbell/LAMMPS/SPH_Bohm/${outputdir}/ion_electron.rdf mode vector

fix write_electron_electron_rdf all ave/time &
${rdf_measurement_time_gap} ${rdf_num_measurements} ${rdf_output_time_step} &
c_electron_electron_rdf[*] file &
/data/tcampbell/LAMMPS/SPH_Bohm/${outputdir}/electron_electron.rdf mode vector

# custom logfile output

thermo_style custom step temp pe ke etotal press

# modify logfile output

thermo_modify lost warn
thermo 50
thermo_style custom step temp pe ke etotal press

variable damping_strength equal 0.0005

fix all_nve all nve

variable equi_time_steps equal 10000.0

variable buff_time_steps equal 10000.0

variable CoM_check_time_steps equal 100.0

variable dump_freq equal 1

variable time_step_length equal 2e-06

timestep ${time_step_length}

### stage 0
dump 0 ion xyz ${dump_freq} /data/tcampbell/LAMMPS/SPH_Bohm/${outputdir}/ion_xyz_data_check0.dump

dump 1 electron custom ${dump_freq} /data/tcampbell/LAMMPS/SPH_Bohm/${outputdir}/ele_xyzh_data_check0.dump id x y z width_SPH x_COM y_COM z_COM vx vy vz

run ${CoM_check_time_steps}

undump 0

undump 1

run ${buff_time_steps}

fix damp_all0 all viscous ${damping_strength}

run ${equi_time_steps}

unfix damp_all0

### stage 1
dump 2 ion xyz ${dump_freq} /data/tcampbell/LAMMPS/SPH_Bohm/${outputdir}/ion_xyz_data_check1.dump

dump 3 electron custom ${dump_freq} /data/tcampbell/LAMMPS/SPH_Bohm/${outputdir}/ele_xyzh_data_check1.dump id x y z width_SPH x_COM y_COM z_COM vx vy vz

run ${CoM_check_time_steps}

undump 2

undump 3

run ${buff_time_steps}

fix damp_all1 all viscous ${damping_strength}

run ${equi_time_steps}

unfix damp_all1

### stage 2
dump 4 ion xyz ${dump_freq} /data/tcampbell/LAMMPS/SPH_Bohm/${outputdir}/ion_xyz_data_check2.dump

dump 5 electron custom ${dump_freq} /data/tcampbell/LAMMPS/SPH_Bohm/${outputdir}/ele_xyzh_data_check2.dump id x y z width_SPH x_COM y_COM z_COM vx vy vz

run ${CoM_check_time_steps}

undump 4

undump 5

run ${buff_time_steps}

fix damp_all2 all viscous ${damping_strength}

run ${equi_time_steps}

unfix damp_all2

### stage 3
dump 6 ion xyz ${dump_freq} /data/tcampbell/LAMMPS/SPH_Bohm/${outputdir}/ion_xyz_data_check3.dump

dump 7 electron custom ${dump_freq} /data/tcampbell/LAMMPS/SPH_Bohm/${outputdir}/ele_xyzh_data_check3.dump id x y z width_SPH x_COM y_COM z_COM vx vy vz

run ${CoM_check_time_steps}

undump 6

undump 7

run ${buff_time_steps}

fix damp_all3 all viscous ${damping_strength}

run ${equi_time_steps}

unfix damp_all3

### stage 4
dump 8 ion xyz ${dump_freq} /data/tcampbell/LAMMPS/SPH_Bohm/${outputdir}/ion_xyz_data_check4.dump

dump 9 electron custom ${dump_freq} /data/tcampbell/LAMMPS/SPH_Bohm/${outputdir}/ele_xyzh_data_check4.dump id x y z width_SPH x_COM y_COM z_COM vx vy vz

run ${CoM_check_time_steps}

undump 8

undump 9

run ${buff_time_steps}

fix damp_all4 all viscous ${damping_strength}

run ${equi_time_steps}

unfix damp_all4

### stage 5
dump 10 ion xyz ${dump_freq} /data/tcampbell/LAMMPS/SPH_Bohm/${outputdir}/ion_xyz_data_check5.dump

dump 11 electron custom ${dump_freq} /data/tcampbell/LAMMPS/SPH_Bohm/${outputdir}/ele_xyzh_data_check5.dump id x y z width_SPH x_COM y_COM z_COM vx vy vz

run ${CoM_check_time_steps}

undump 10

undump 11

run ${buff_time_steps}

fix damp_all5 all viscous ${damping_strength}

run ${equi_time_steps}

unfix damp_all5

### stage 6
dump 12 ion xyz ${dump_freq} /data/tcampbell/LAMMPS/SPH_Bohm/${outputdir}/ion_xyz_data_check6.dump

dump 13 electron custom ${dump_freq} /data/tcampbell/LAMMPS/SPH_Bohm/${outputdir}/ele_xyzh_data_check6.dump id x y z width_SPH x_COM y_COM z_COM vx vy vz

run ${CoM_check_time_steps}

undump 12

undump 13

run ${buff_time_steps}

fix damp_all6 all viscous ${damping_strength}

run ${equi_time_steps}

unfix damp_all6

### stage 7
dump 14 ion xyz ${dump_freq} /data/tcampbell/LAMMPS/SPH_Bohm/${outputdir}/ion_xyz_data_check7.dump

dump 15 electron custom ${dump_freq} /data/tcampbell/LAMMPS/SPH_Bohm/${outputdir}/ele_xyzh_data_check7.dump id x y z width_SPH x_COM y_COM z_COM vx vy vz

run ${CoM_check_time_steps}

undump 14

undump 15

run ${buff_time_steps}

fix damp_all7 all viscous ${damping_strength}

run ${equi_time_steps}

unfix damp_all7

dump 16 ion xyz ${dump_freq} /data/tcampbell/LAMMPS/SPH_Bohm/${outputdir}/ion_xyz_data_check8.dump

dump 17 electron custom ${dump_freq} /data/tcampbell/LAMMPS/SPH_Bohm/${outputdir}/ele_xyzh_data_check8.dump id x y z width_SPH x_COM y_COM z_COM vx vy vz

run ${CoM_check_time_steps}

undump 16

undump 17

quit 0
