# Set output directory

variable out_number string 2c

### BACKUP SIMULATION FILES

variable gamma_factor equal 1822.888483 #(correct for 241024) must match 1/e_mass

variable outputdir string hedp_bohm_only_VB_diag_only_${out_number}
shell mkdir /mnt/ext_drive/data/tcampbell/diag_tests/${outputdir}/
shell cp ~/fresh_lammps-3Mar20/lammps-3Mar20/SPH_Bohm/in.hedp_SPH_confine_test_${out_number} /mnt/ext_drive/data/tcampbell/diag_tests/${outputdir}/
shell cp ~/fresh_lammps-3Mar20/lammps-3Mar20/src/pair_bohm_SPH_dynamic.cpp /mnt/ext_drive/data/tcampbell/diag_tests/${outputdir}/
shell cp ~/fresh_lammps-3Mar20/lammps-3Mar20/src/pair_bohm_SPH_dynamic.h /mnt/ext_drive/data/tcampbell/diag_tests/${outputdir}/
shell cp ~/fresh_lammps-3Mar20/lammps-3Mar20/src/pair_coul_long_SPH_ph.cpp /mnt/ext_drive/data/tcampbell/diag_tests/${outputdir}/
shell cp ~/fresh_lammps-3Mar20/lammps-3Mar20/src/pair_coul_long_SPH_ph.h /mnt/ext_drive/data/tcampbell/diag_tests/${outputdir}/
log /mnt/ext_drive/data/tcampbell/diag_tests/${outputdir}/log.${outputdir}

### SYSTEM PARAMETERS:

### physical parameters:

variable num_ions equal 32	                                        # Number of ions
variable ion_charge equal 1.0			                                # Average charge/ionization
variable ion_amu equal 1.008	                                # Atomic mass of ion
variable electron_amu equal 0.00054857991                           # Atomic mass of electrons

variable elements_per_electron equal 64

variable element_scaled_mass equal ${electron_amu}/${elements_per_electron}
variable element_scaled_charge equal -1/${elements_per_electron}

variable num_electrons equal ${num_ions}*${ion_charge}
variable num_electron_elements equal ${num_electrons}*${elements_per_electron}
variable half_num_electrons equal ${num_electrons}/2.0
variable box_len equal 7.11
variable half_box_len equal ${box_len}/2.0

variable dens_wid_const equal 0.91924
variable kernel_ave equal ${dens_wid_const}*${box_len}/(${num_electron_elements}^(1/3))
variable tfwhm equal 4.70964*${kernel_ave}
variable sigma_start equal ${kernel_ave}    # Start global packet width of electrons in bohr

### simulation parameters:

variable time_step_length equal 0.1e-3
variable equi_time_steps equal 0
variable dump_freq equal 1
variable cutoff equal 4.243*${kernel_ave}                                  # cutoff for pairwise calculations

units electron                                                      # use electron units (Hartree)
newton on
boundary p p p
atom_style SPH_CoM

# Pair style string selection

variable pair_name string bohm_SPH_dynamic_Mocz_rob_ftwo_pot_diag_bas

variable ion_seed equal 1
variable e_up_a_seed equal 2
variable e_up_b_seed equal 3
variable e_down_a_seed equal 4
variable e_down_b_seed equal 5

# thermostat parameters

variable ion_vel_seed equal 6
variable e_down_a_vel_seed equal 7
variable e_down_b_vel_seed equal 8
variable e_up_a_vel_seed equal 9
variable e_up_b_vel_seed equal 10

### NOTE - initialising particles from rest
variable vel_t equal 0.0

### Setup simulation

region bounding_region block 0.0 ${box_len} 0.0 ${box_len} 0.0 ${box_len}
timestep ${time_step_length}

create_box 1 bounding_region

create_atoms 1 random ${num_electron_elements} ${e_up_a_seed} NULL
group electron type 1
mass 1 ${element_scaled_mass}
set type 1 charge ${element_scaled_charge}

# increase number of allowed neighbours
neigh_modify one 10000

variable tag_ele_start equal 1

# Ensure ghost atom velocities communicated for SPH Bohm Potential:

comm_modify vel yes

### Dynamic Width fix
variable N_iter equal 2
variable mix_fact equal 1.0
variable type_avoid equal 10 #ensure ions are not included in SPH loops (must match ion type)

# fix Bohm_Pot electron dynamic_widths_com_bp_mocz_rob_ftwo ${dens_wid_const} ${N_iter} ${mix_fact} ${sigma_start} ${cutoff} ${box_len} ${type_avoid} ${num_electrons} ${elements_per_electron} ${tag_ele_start} ${gamma_factor} ${pair_name}
# fix_modify Bohm_Pot energy yes

fix ele_dyn_wid electron dynamic_widths_com ${dens_wid_const} ${N_iter} ${mix_fact} ${sigma_start} ${cutoff} ${box_len} ${type_avoid} ${num_electrons} ${elements_per_electron} ${tag_ele_start} ${pair_name}

pair_style ${pair_name} ${cutoff} ${gamma_factor} ${elements_per_electron}

# Set up each pair with the correct styles:

pair_coeff * *

fix all_nve all nve
velocity electron create ${vel_t} ${e_down_a_vel_seed} &
rot yes dist gaussian

compute all_momentum all momentum

fix write_all_momentum all ave/time &
1 1 ${dump_freq} &
c_all_momentum[*] file &
/mnt/ext_drive/data/tcampbell/diag_tests/${outputdir}/all_momentum.out mode vector

# custom logfile output

thermo_modify lost warn
thermo ${dump_freq}
thermo_style custom step temp pe ke etotal press

dump 1 electron custom ${dump_freq} /mnt/ext_drive/data/tcampbell/diag_tests/${outputdir}/ele_xyzh_data_check0.dump id x y z width_SPH x_COM y_COM z_COM vx vy vz rho_SPH u_SPH
dump_modify 1 format line "%d %16.16f %16.16f %16.16f %16.16f %16.16f %16.16f %16.16f %16.16f %16.16f %16.16f %16.16f %16.16f"

run ${equi_time_steps}

undump 1

quit 0
