# Set output directory

variable out_number string 137a

### BACKUP SIMULATION FILES

# CAREFUL - check pauli_table gamma coefficient matches gamma_factor input

variable gamma_factor equal 1.0

variable outputdir string scarf_H_10_77eV_1_75_rs_min_${out_number}
shell mkdir /work4/clf/scarf734/LAMMPS/SPH_Bohm/H_research/${outputdir}/
shell cp ~/mywork/LAMMPS/fresh-lammps-3Mar20/lammps-3Mar20/H_research/in.${outputdir} /work4/clf/scarf734/LAMMPS/SPH_Bohm/H_research/${outputdir}/
shell cp ~/mywork/LAMMPS/fresh-lammps-3Mar20/lammps-3Mar20/src/pair_bohm_SPH_dynamic.cpp /work4/clf/scarf734/LAMMPS/SPH_Bohm/H_research/${outputdir}/
shell cp ~/mywork/LAMMPS/fresh-lammps-3Mar20/lammps-3Mar20/src/pair_bohm_SPH_dynamic.h /work4/clf/scarf734/LAMMPS/SPH_Bohm/H_research/${outputdir}/
shell cp ~/mywork/LAMMPS/fresh-lammps-3Mar20/lammps-3Mar20/src/pair_coul_long_SPH_ph.cpp /work4/clf/scarf734/LAMMPS/SPH_Bohm/H_research/${outputdir}/
shell cp ~/mywork/LAMMPS/fresh-lammps-3Mar20/lammps-3Mar20/src/pair_coul_long_SPH_ph.h /work4/clf/scarf734/LAMMPS/SPH_Bohm/H_research/${outputdir}/
log /work4/clf/scarf734/LAMMPS/SPH_Bohm/H_research/${outputdir}/log.${outputdir}

### SYSTEM PARAMETERS:

### physical parameters:

variable temp equal 10.77	         # temperature in Ev
variable ion_density equal 0.044545217  		# Density in # per bohr^3
variable num_ions equal 200	                                        # Number of ions
variable ion_charge equal 1.0			                                # Average charge/ionization
variable ion_amu equal 1.008	                                # Atomic mass of ion
variable electron_amu equal 0.00054857991                           # Atomic mass of electrons

variable sigma_start equal 1.7                                         # Start global packet width of electrons in bohr

variable elements_per_electron equal 8

variable element_scaled_mass equal ${electron_amu}/${elements_per_electron}
variable element_scaled_charge equal -1/${elements_per_electron}

variable num_electrons equal ${num_ions}*${ion_charge}
variable num_electron_elements equal ${num_electrons}*${elements_per_electron}
variable half_num_electrons equal ${num_electrons}/2.0
variable quar_num_electrons equal ${half_num_electrons}/2.0
variable temptouse equal 11604.5221*${temp}
variable box_len equal (${num_ions}/${ion_density})^(1/3)
variable half_box_len equal ${box_len}/2.0

variable confine_strength equal 0.02469        # set strength of qudratic confinement potential for SPH elements belonging to the same electron

### simulation parameters:

variable time_step_length equal 0.25e-3
variable block_time_steps equal 1e4
variable CoM_check_time_steps equal 1e3
variable CoM_freq equal 10
variable data_block_time_steps equal 1e4
variable e_dump_ts_freq equal 100
variable cutoff equal 8.0                                  # cutoff for pairwise calculations

units electron                                                      # use electron units (Hartree)
newton on
boundary p p p
atom_style SPH_CoM

# Pair style string selection

variable pair_name string bohm_SPH_dynamic_Mocz

variable ion_seed equal 1
variable e_up_a_seed equal 2
variable e_up_b_seed equal 3
variable e_down_a_seed equal 4
variable e_down_b_seed equal 5

# thermostat parameters

variable ion_vel_seed equal 6
variable e_down_a_vel_seed equal 7
variable e_down_b_vel_seed equal 8
variable e_up_a_vel_seed equal 9
variable e_up_b_vel_seed equal 10

variable i_temp_damping equal ${time_step_length}*100
variable e_temp_damping equal ${time_step_length}*200

### NOTE - initialising particles from rest
variable vel_t equal 1.0*${temptouse}

# rdf calculation

variable rdf_num_bins equal 150
variable rdf_num_measurements equal 100
variable rdf_output_time_step equal 4000
variable rdf_measurement_time_gap equal 10

### Setup simulation

region bounding_region block 0.0 ${box_len} 0.0 ${box_len} 0.0 ${box_len}
timestep ${time_step_length}

create_box 1 bounding_region

create_atoms 1 random ${num_electron_elements} ${e_up_a_seed} NULL
group electron type 1
mass 1 ${element_scaled_mass}
set type 1 charge ${element_scaled_charge}

# increase number of allowed neighbours
neigh_modify one 10000

variable tag_ele_start equal 1

# Ensure ghost atom velocities communicated for SPH Bohm Potential:

comm_modify vel yes

### Dynamic Width fix
variable dens_wid_const equal 1.2
variable N_iter equal 1
variable mix_fact equal 1.0
variable tfwhm equal 4.70964*${dens_wid_const}*${box_len}/(${num_electron_elements}^(1/3))
variable type_avoid equal 10 #ensure ions are not included in SPH loops (must match ion type)

fix ele_dyn_wid electron dynamic_widths_com ${dens_wid_const} ${N_iter} ${mix_fact} ${sigma_start} ${cutoff} ${box_len} ${type_avoid} ${num_electrons} ${elements_per_electron} ${tag_ele_start} confine

pair_style hybrid/overlay sub_minoo ${cutoff} ${temptouse} ${electron_amu} ${elements_per_electron} ${tag_ele_start} ${pair_name} ${cutoff} ${gamma_factor} confine ${confine_strength} ${cutoff} ${box_len} ${elements_per_electron}

# Set up each pair with the correct styles:

pair_coeff * * ${pair_name}
pair_coeff * * confine
pair_coeff * * sub_minoo

# increase number of allowed neighbours
neigh_modify one 10000

### Thermostatting
fix all_nve all nve

velocity electron create ${vel_t} ${e_down_a_vel_seed} &
rot yes dist gaussian

# Randomize the starting positions of all of our particles

displace_atoms all random 0.1 0.1 0.1 42

# custom logfile output

thermo_style custom step temp pe ke etotal press

# Minimize energy

min_style cg
minimize 1.0e-7 1.0e-8 50 50

reset_timestep 0

# modify logfile output

thermo_modify lost warn
thermo 10
thermo_style custom step temp pe ke etotal press

run ${block_time_steps}

# save small dump of positions and widths for CoM checking
dump 1 electron custom ${CoM_freq} /work4/clf/scarf734/LAMMPS/SPH_Bohm/H_research/${outputdir}/ele_xyzh_data_check1.dump id x y z width_SPH x_COM y_COM z_COM vx vy vz

run ${CoM_check_time_steps}

undump 1

run ${block_time_steps}

# save small dump of positions and widths for CoM checking
dump 2 electron custom ${CoM_freq} /work4/clf/scarf734/LAMMPS/SPH_Bohm/H_research/${outputdir}/ele_xyzh_data_check2.dump id x y z width_SPH x_COM y_COM z_COM vx vy vz

run ${CoM_check_time_steps}

undump 2

run ${block_time_steps}

# save small dump of positions and widths for CoM checking
dump 3 electron custom ${CoM_freq} /work4/clf/scarf734/LAMMPS/SPH_Bohm/H_research/${outputdir}/ele_xyzh_data_check3.dump id x y z width_SPH x_COM y_COM z_COM vx vy vz

run ${CoM_check_time_steps}

undump 3

run ${block_time_steps}

# save small dump of positions and widths for CoM checking
dump 4 electron custom ${CoM_freq} /work4/clf/scarf734/LAMMPS/SPH_Bohm/H_research/${outputdir}/ele_xyzh_data_check4.dump id x y z width_SPH x_COM y_COM z_COM vx vy vz

run ${CoM_check_time_steps}

undump 4

run ${block_time_steps}

# save small dump of positions and widths for CoM checking
dump 5 electron custom ${CoM_freq} /work4/clf/scarf734/LAMMPS/SPH_Bohm/H_research/${outputdir}/ele_xyzh_data_check5.dump id x y z width_SPH x_COM y_COM z_COM vx vy vz

run ${CoM_check_time_steps}

undump 5

run ${block_time_steps}

# save small dump of positions and widths for CoM checking
dump 6 electron custom ${CoM_freq} /work4/clf/scarf734/LAMMPS/SPH_Bohm/H_research/${outputdir}/ele_xyzh_data_check6.dump id x y z width_SPH x_COM y_COM z_COM vx vy vz

run ${CoM_check_time_steps}

undump 6

# dynamic data output
dump 7 electron custom ${e_dump_ts_freq} /work4/clf/scarf734/LAMMPS/SPH_Bohm/H_research/${outputdir}/ele_xyzh_data.dump id x y z width_SPH

run ${data_block_time_steps}

# save small dump of positions and widths for CoM checking
dump 9 electron custom ${CoM_freq} /work4/clf/scarf734/LAMMPS/SPH_Bohm/H_research/${outputdir}/ele_xyzh_data_check7.dump id x y z width_SPH x_COM y_COM z_COM vx vy vz

run ${CoM_check_time_steps}

undump 9

run ${data_block_time_steps}

# save small dump of positions and widths for CoM checking
dump 10 electron custom ${CoM_freq} /work4/clf/scarf734/LAMMPS/SPH_Bohm/H_research/${outputdir}/ele_xyzh_data_check8.dump id x y z width_SPH x_COM y_COM z_COM vx vy vz

run ${CoM_check_time_steps}

undump 10

run ${data_block_time_steps}

# save small dump of positions and widths for CoM checking
dump 11 electron custom ${CoM_freq} /work4/clf/scarf734/LAMMPS/SPH_Bohm/H_research/${outputdir}/ele_xyzh_data_check9.dump id x y z width_SPH x_COM y_COM z_COM vx vy vz

run ${CoM_check_time_steps}

undump 11

run ${data_block_time_steps}

# save small dump of positions and widths for CoM checking
dump 12 electron custom ${CoM_freq} /work4/clf/scarf734/LAMMPS/SPH_Bohm/H_research/${outputdir}/ele_xyzh_data_check10.dump id x y z width_SPH x_COM y_COM z_COM vx vy vz

run ${CoM_check_time_steps}

undump 12

run ${data_block_time_steps}

undump 7


quit 0
