# Set output directory

variable out_number string 55b

### BACKUP SIMULATION FILES

# CAREFUL - check pauli_table gamma coefficient matches gamma_factor input

variable gamma_factor equal 1.0

variable outputdir string scarf_H_10_77eV_1_75_rs_min_${out_number}
shell mkdir /work4/clf/scarf734/LAMMPS/SPH_Bohm/H_research/${outputdir}/
shell cp ~/mywork/LAMMPS/fresh-lammps-3Mar20/lammps-3Mar20/H_research/in.${outputdir} /work4/clf/scarf734/LAMMPS/SPH_Bohm/H_research/${outputdir}/
shell cp ~/mywork/LAMMPS/fresh-lammps-3Mar20/lammps-3Mar20/src/pair_bohm_SPH_dynamic.cpp /work4/clf/scarf734/LAMMPS/SPH_Bohm/H_research/${outputdir}/
shell cp ~/mywork/LAMMPS/fresh-lammps-3Mar20/lammps-3Mar20/src/pair_bohm_SPH_dynamic.h /work4/clf/scarf734/LAMMPS/SPH_Bohm/H_research/${outputdir}/
shell cp ~/mywork/LAMMPS/fresh-lammps-3Mar20/lammps-3Mar20/src/pair_coul_long_SPH_ph.cpp /work4/clf/scarf734/LAMMPS/SPH_Bohm/H_research/${outputdir}/
shell cp ~/mywork/LAMMPS/fresh-lammps-3Mar20/lammps-3Mar20/src/pair_coul_long_SPH_ph.h /work4/clf/scarf734/LAMMPS/SPH_Bohm/H_research/${outputdir}/
log /work4/clf/scarf734/LAMMPS/SPH_Bohm/H_research/${outputdir}/log.${outputdir}

### SYSTEM PARAMETERS:

### physical parameters:

variable temp equal 10.77	         # temperature in Ev
variable ion_density equal 0.044545217  		# Density in # per bohr^3
variable num_ions equal 500	                                        # Number of ions
variable ion_charge equal 1.0			                                # Average charge/ionization
variable ion_amu equal 1.008	                                # Atomic mass of ion
variable electron_amu equal 0.00054857991                           # Atomic mass of electrons

variable sigma_start equal 1.3                                         # Start global packet width of electrons in bohr

variable elements_per_electron equal 16

variable element_scaled_mass equal ${electron_amu}/${elements_per_electron}
variable element_scaled_charge equal -1/${elements_per_electron}

variable num_electrons equal ${num_ions}*${ion_charge}
variable num_electron_elements equal ${num_electrons}*${elements_per_electron}
variable half_num_electrons equal ${num_electrons}/2.0
variable quar_num_electrons equal ${half_num_electrons}/2.0
variable temptouse equal 11604.5221*${temp}
variable box_len equal (${num_ions}/${ion_density})^(1/3)
variable half_box_len equal ${box_len}/2.0

variable confine_strength equal 2.0        # set strength of qudratic confinement potential for SPH elements belonging to the same electron

### simulation parameters:

variable time_step_length equal 0.25e-3
variable equi_time_steps equal 1e6
variable buff_time_steps equal 1e5
variable CoM_check_time_steps equal 10
variable ele_data_time_steps equal 1.9999e6
variable e_dump_ts_freq equal 70
variable cutoff equal 7.98                                        # cutoff for pairwise calculations

units electron                                                      # use electron units (Hartree)
newton on
boundary p p p
atom_style SPH_CoM

# Pair style string selection

variable pair_name string bohm_SPH_dynamic_Mocz

variable rnseed index 10
variable number equal ceil(random(1,10000000000,${rnseed})/100000.0)

variable ion_seed equal ${number}
variable e_up_a_seed equal ${number}
variable e_up_b_seed equal ${number}
variable e_down_a_seed equal ${number}
variable e_down_b_seed equal ${number}

# thermostat parameters

variable ion_vel_seed equal ${number}
variable e_down_a_vel_seed equal ${number}
variable e_down_b_vel_seed equal ${number}
variable e_up_a_vel_seed equal ${number}
variable e_up_b_vel_seed equal ${number}

variable i_temp_damping equal ${time_step_length}*100
variable e_temp_damping equal ${time_step_length}*100

### NOTE - initialising particles from rest
variable vel_t equal 1.0*${temptouse}

# rdf calculation

variable rdf_num_bins equal 150
variable rdf_num_measurements equal 100
variable rdf_output_time_step equal 4000
variable rdf_measurement_time_gap equal 10

### Setup simulation

region bounding_region block 0.0 ${box_len} 0.0 ${box_len} 0.0 ${box_len}
timestep ${time_step_length}

create_box 2 bounding_region

create_atoms 1 random ${num_ions} ${ion_seed} NULL
group ion type 1
mass 1 ${ion_amu}
set type 1 charge ${ion_charge}

create_atoms 2 random ${num_electron_elements} ${e_up_a_seed} NULL
group electron type 2
mass 2 ${element_scaled_mass}
set type 2 charge ${element_scaled_charge}

variable tag_ele_start equal ${num_ions}+1

# Ensure ghost atom velocities communicated for SPH Bohm Potential:

comm_modify vel yes

### Dynamic Width fix
variable dens_wid_const equal 1.2
variable N_iter equal 1
variable mix_fact equal 1.0
variable tfwhm equal 4.70964*${dens_wid_const}*${box_len}/(${num_electron_elements}^(1/3))
variable type_avoid equal 1 #ensure ions are not included in SPH loops (must match ion type)

# Call dynamic_widths_com to ensure calculation of electron Centres of Mass

fix ele_dyn_wid electron dynamic_widths_com ${dens_wid_const} ${N_iter} ${mix_fact} ${sigma_start} ${cutoff} ${box_len} ${type_avoid} ${num_electrons} ${elements_per_electron} ${tag_ele_start} ${pair_name}

pair_style hybrid/overlay ${pair_name} ${cutoff} ${gamma_factor} coul/long/SPH_nopseudo_ph_sub ${cutoff} 1.0 1 ${tfwhm} ${elements_per_electron} ${tag_ele_start} sub_minoo ${cutoff} ${temptouse} ${electron_amu} ${elements_per_electron} ${tag_ele_start} confine ${confine_strength} ${cutoff} ${box_len}

# Set up each pair with the correct styles:

pair_coeff * * coul/long/SPH_nopseudo_ph_sub

pair_coeff 2 2 ${pair_name}

pair_coeff 2 2 sub_minoo

pair_coeff 2 2 confine

# increase number of allowed neighbours
neigh_modify one 10000

# kspace
variable ewalds_parameter equal 3/${cutoff}
kspace_style ewald 1.0e-4
kspace_modify gewald ${ewalds_parameter}

fix ele_nvt electron nvt temp ${temptouse} ${temptouse} ${e_temp_damping}

### Thermostatting

fix ion_nvt ion nvt temp ${temptouse} ${temptouse} ${i_temp_damping}

velocity ion create ${temptouse} ${ion_vel_seed} &
rot yes dist gaussian

velocity electron create ${vel_t} ${e_down_a_vel_seed} &
rot yes dist gaussian

# Randomize the starting positions of all of our particles

displace_atoms all random 0.1 0.1 0.1 42

# Compute group temperatures for output in logfile

compute ion_temp ion temp

compute electron_temp electron temp

# Compute pair correlation functions:

compute ion_ion_rdf all rdf ${rdf_num_bins} &
1 1

compute ion_electron_rdf all rdf ${rdf_num_bins} &
1 2

compute electron_electron_rdf all rdf ${rdf_num_bins} &
2 2

fix write_ion_ion_rdf all ave/time &
${rdf_measurement_time_gap} ${rdf_num_measurements} ${rdf_output_time_step} &
c_ion_ion_rdf[*] file &
/work4/clf/scarf734/LAMMPS/SPH_Bohm/H_research/${outputdir}/ion_ion.rdf mode vector

fix write_ion_electron_rdf all ave/time &
${rdf_measurement_time_gap} ${rdf_num_measurements} ${rdf_output_time_step} &
c_ion_electron_rdf[*] file &
/work4/clf/scarf734/LAMMPS/SPH_Bohm/H_research/${outputdir}/ion_electron.rdf mode vector

fix write_electron_electron_rdf all ave/time &
${rdf_measurement_time_gap} ${rdf_num_measurements} ${rdf_output_time_step} &
c_electron_electron_rdf[*] file &
/work4/clf/scarf734/LAMMPS/SPH_Bohm/H_research/${outputdir}/electron_electron.rdf mode vector

# custom logfile output

thermo_style custom step temp c_ion_temp c_electron_temp pe ke etotal press

# Minimize energy

min_style cg
minimize 1.0e-7 1.0e-8 50 50

reset_timestep 0

# Check forces

variable rhi equal 19.36
variable rlo equal 1.001e-2
variable write_N equal 1936

# modify logfile output

thermo_modify lost warn
thermo 50
thermo_style custom step temp c_ion_temp c_electron_temp pe ke etotal press

# dump 1 all custom ${dump_ts_freq} /work4/clf/scarf734/LAMMPS/SPH_Bohm/H_research/${outputdir}/all_data.dump id type fx fy fz x y z rho_SPH width_SPH omega_SPH u_SPH vx vy vz
# dump_modify 1 format line "%d %d %16.16f %16.16f %16.16f %16.16f %16.16f %16.16f %16.16f %16.16f %16.16f %16.16f %16.16f %16.16f %16.16f"
run ${equi_time_steps}

unfix ion_nvt
unfix ele_nvt
fix all_nve all nve

# allow system to settle after turning off ion thermostat
run ${buff_time_steps}

dump 3 electron custom ${e_dump_ts_freq} /work4/clf/scarf734/LAMMPS/SPH_Bohm/H_research/${outputdir}/ele_xyzh_data_check.dump id x y z width_SPH x_COM y_COM z_COM

# save small dump of positions and widths for CoM checking
run ${CoM_check_time_steps}

undump 3

dump 4 electron custom ${e_dump_ts_freq} /work4/clf/scarf734/LAMMPS/SPH_Bohm/H_research/${outputdir}/ele_xyzh_data.dump id x y z width_SPH x_COM y_COM z_COM
# dump_modify 4 format line "%d %8.8f %8.8f %8.8f %8.8f"

dump 5 ion xyz ${e_dump_ts_freq} /work4/clf/scarf734/LAMMPS/SPH_Bohm/H_research/${outputdir}/ion_e_freq_xyz_data.dump
# dump_modify 5 format line "%d %8.8f %8.8f %8.8f"

run ${ele_data_time_steps}

quit 0
