# Set output directory

variable out_number string 71

### BACKUP SIMULATION FILES

# CAREFUL - check pauli_table gamma coefficient matches gamma_factor input

variable gamma_factor equal 1.0

variable outputdir string scarf_H_10_77eV_1_75_rs_min_${out_number}
shell mkdir /work4/clf/scarf734/LAMMPS/SPH_Bohm/H_research/${outputdir}/
shell cp ~/mywork/LAMMPS/fresh-lammps-3Mar20/lammps-3Mar20/H_research/in.${outputdir} /work4/clf/scarf734/LAMMPS/SPH_Bohm/H_research/${outputdir}/
shell cp ~/mywork/LAMMPS/fresh-lammps-3Mar20/lammps-3Mar20/src/pair_bohm_SPH_dynamic.cpp /work4/clf/scarf734/LAMMPS/SPH_Bohm/H_research/${outputdir}/
shell cp ~/mywork/LAMMPS/fresh-lammps-3Mar20/lammps-3Mar20/src/pair_bohm_SPH_dynamic.h /work4/clf/scarf734/LAMMPS/SPH_Bohm/H_research/${outputdir}/
shell cp ~/mywork/LAMMPS/fresh-lammps-3Mar20/lammps-3Mar20/src/pair_coul_long_SPH_ph.cpp /work4/clf/scarf734/LAMMPS/SPH_Bohm/H_research/${outputdir}/
shell cp ~/mywork/LAMMPS/fresh-lammps-3Mar20/lammps-3Mar20/src/pair_coul_long_SPH_ph.h /work4/clf/scarf734/LAMMPS/SPH_Bohm/H_research/${outputdir}/
log /work4/clf/scarf734/LAMMPS/SPH_Bohm/H_research/${outputdir}/log.${outputdir}

### SYSTEM PARAMETERS:

### physical parameters:

variable temp equal 10.77	         # temperature in Ev
variable ion_density equal 0.044545217  		# Density in # per bohr^3
variable num_ions equal 200	                                        # Number of ions
variable ion_charge equal 1.0			                                # Average charge/ionization
variable ion_amu equal 1.008	                                # Atomic mass of ion
variable electron_amu equal 0.00054857991                           # Atomic mass of electrons

variable sigma_start equal 1.3                                         # Start global packet width of electrons in bohr

variable elements_per_electron equal 16

variable element_scaled_mass equal ${electron_amu}/${elements_per_electron}
variable element_scaled_charge equal -1/${elements_per_electron}

variable num_electrons equal ${num_ions}*${ion_charge}
variable num_electron_elements equal ${num_electrons}*${elements_per_electron}
variable half_num_electrons equal ${num_electrons}/2.0
variable quar_num_electrons equal ${half_num_electrons}/2.0
variable temptouse equal 11604.5221*${temp}
variable box_len equal (${num_ions}/${ion_density})^(1/3)
variable half_box_len equal ${box_len}/2.0

variable confine_strength equal 2.0        # set strength of qudratic confinement potential for SPH elements belonging to the same electron

### simulation parameters:

variable time_step_length equal 0.25e-3
variable equi_time_steps equal 1e4
variable buff_time_steps equal 1e3
variable CoM_check_time_steps equal 10
variable cutoff equal 7.98                                        # cutoff for pairwise calculations

units electron                                                      # use electron units (Hartree)
newton on
boundary p p p
atom_style SPH_CoM

# Pair style string selection

variable pair_name string bohm_SPH_dynamic_Mocz

variable rnseed index 10
variable number equal ceil(random(1,10000000000,${rnseed})/100000.0)

variable ion_seed equal ${number}
variable e_up_a_seed equal ${number}
variable e_up_b_seed equal ${number}
variable e_down_a_seed equal ${number}
variable e_down_b_seed equal ${number}

# thermostat parameters

variable ion_vel_seed equal ${number}
variable e_down_a_vel_seed equal ${number}
variable e_down_b_vel_seed equal ${number}
variable e_up_a_vel_seed equal ${number}
variable e_up_b_vel_seed equal ${number}

variable i_temp_damping equal ${time_step_length}*100
variable e_temp_damping equal ${time_step_length}*100

### NOTE - initialising particles from rest
variable vel_t equal 1.0*${temptouse}

# rdf calculation

variable rdf_num_bins equal 150
variable rdf_num_measurements equal 100
variable rdf_output_time_step equal 4000
variable rdf_measurement_time_gap equal 10

### Setup simulation

region bounding_region block 0.0 ${box_len} 0.0 ${box_len} 0.0 ${box_len}
timestep ${time_step_length}

create_box 1 bounding_region

create_atoms 1 random ${num_electron_elements} ${e_up_a_seed} NULL
group electron type 1
mass 1 ${element_scaled_mass}
set type 1 charge ${element_scaled_charge}

variable tag_ele_start equal ${num_ions}+1

# Ensure ghost atom velocities communicated for SPH Bohm Potential:

comm_modify vel yes

### Dynamic Width fix
variable dens_wid_const equal 1.2
variable N_iter equal 1
variable mix_fact equal 1.0
variable tfwhm equal 4.70964*${dens_wid_const}*${box_len}/(${num_electron_elements}^(1/3))
variable type_avoid equal 10 #ensure ions are not included in SPH loops (must match ion type)

# Call dynamic_widths_com to ensure calculation of electron Centres of Mass

fix ele_dyn_wid electron dynamic_widths_com ${dens_wid_const} ${N_iter} ${mix_fact} ${sigma_start} ${cutoff} ${box_len} ${type_avoid} ${num_electrons} ${elements_per_electron} ${tag_ele_start} ${pair_name}

pair_style hybrid/overlay ${pair_name} ${cutoff} ${gamma_factor} confine ${confine_strength} ${cutoff} ${box_len}

# Set up each pair with the correct styles:

pair_coeff * * ${pair_name}

pair_coeff * * confine

fix all_nve all nve

# increase number of allowed neighbours
neigh_modify one 10000

### Thermostatting

velocity electron create ${vel_t} ${e_down_a_vel_seed} &
rot yes dist gaussian

# Randomize the starting positions of all of our particles

displace_atoms all random 0.1 0.1 0.1 42

# custom logfile output

thermo_style custom step temp pe ke etotal press

# Minimize energy

min_style cg
minimize 1.0e-7 1.0e-8 200 200

reset_timestep 0

# Check forces

variable rhi equal 19.36
variable rlo equal 1.001e-2
variable write_N equal 1936

# modify logfile output

thermo_modify lost warn
thermo 10
thermo_style custom step temp pe ke etotal press

run ${equi_time_steps}

# allow system to settle after turning off ion thermostat
run ${buff_time_steps}

dump 3 electron custom 1 /work4/clf/scarf734/LAMMPS/SPH_Bohm/H_research/${outputdir}/ele_xyzh_data_check.dump id x y z vx vy vz width_SPH x_COM y_COM z_COM

# save small dump of positions and widths for CoM checking
run ${CoM_check_time_steps}

quit 0
