# Set output directory

variable out_number string conf_full_7a_strong_8

### BACKUP SIMULATION FILES

variable gamma_factor equal 1822.888483

variable outputdir string scarf_H_21_54eV_1_75_rs_min_${out_number}
shell mkdir /work4/clf/scarf734/LAMMPS/SPH_Bohm/H_research/21_54eV_1_75_rs/confine_full/${outputdir}/
shell cp ~/mywork/LAMMPS/fresh-lammps-3Mar20/lammps-3Mar20/H_research/21_54eV_1_75_rs/in.${outputdir} /work4/clf/scarf734/LAMMPS/SPH_Bohm/H_research/21_54eV_1_75_rs/confine_full/${outputdir}/
shell cp ~/mywork/LAMMPS/fresh-lammps-3Mar20/lammps-3Mar20/src/pair_bohm_SPH_dynamic.cpp /work4/clf/scarf734/LAMMPS/SPH_Bohm/H_research/21_54eV_1_75_rs/confine_full/${outputdir}/
shell cp ~/mywork/LAMMPS/fresh-lammps-3Mar20/lammps-3Mar20/src/pair_bohm_SPH_dynamic.h /work4/clf/scarf734/LAMMPS/SPH_Bohm/H_research/21_54eV_1_75_rs/confine_full/${outputdir}/
shell cp ~/mywork/LAMMPS/fresh-lammps-3Mar20/lammps-3Mar20/src/pair_coul_long_SPH_ph.cpp /work4/clf/scarf734/LAMMPS/SPH_Bohm/H_research/21_54eV_1_75_rs/confine_full/${outputdir}/
shell cp ~/mywork/LAMMPS/fresh-lammps-3Mar20/lammps-3Mar20/src/pair_coul_long_SPH_ph.h /work4/clf/scarf734/LAMMPS/SPH_Bohm/H_research/21_54eV_1_75_rs/confine_full/${outputdir}/
log /work4/clf/scarf734/LAMMPS/SPH_Bohm/H_research/21_54eV_1_75_rs/confine_full/${outputdir}/log.${outputdir}

### SYSTEM PARAMETERS:

### physical parameters:

variable temp equal 21.54	         # temperature in Ev
variable ion_density equal 0.044545217  		# Density in # per bohr^3
variable num_ions equal 512	                                        # Number of ions
variable ion_charge equal 1.0			                                # Average charge/ionization
variable ion_amu equal 1.008	                                # Atomic mass of ion
variable electron_amu equal 0.00054857991                           # Atomic mass of electrons

variable elements_per_electron equal 32

variable element_scaled_mass equal ${electron_amu}/${elements_per_electron}
variable element_scaled_charge equal -1/${elements_per_electron}

variable num_electrons equal ${num_ions}*${ion_charge}
variable num_electron_elements equal ${num_electrons}*${elements_per_electron}
variable half_num_electrons equal ${num_electrons}/2.0
variable temptouse equal 11604.5221*${temp}
variable box_len equal (${num_ions}/${ion_density})^(1/3)
variable half_box_len equal ${box_len}/2.0

variable confine_strength equal 0.255        # set strength of qudratic confinement potential for SPH elements belonging to the same electron

variable dens_wid_const equal 0.91924
variable kernel_ave equal ${dens_wid_const}*${box_len}/(${num_electron_elements}^(1/3))
variable tfwhm equal 4.70964*${kernel_ave}
variable sigma_start equal ${kernel_ave}    # Start global packet width of electrons in bohr

### simulation parameters:

variable time_step_length equal 0.00625e-3
variable block_time_steps equal 250                 # cutoff for pairwise calculations
variable cutoff_SPH equal 4.243*${kernel_ave}                                  # cutoff for pairwise calculations
variable cutoff equal 1.25*${tfwhm}
variable cutoff_Minoo equal 3.372

units electron                                                      # use electron units (Hartree)
newton on
boundary p p p
atom_style SPH_CoM

# Pair style string selection

variable pair_name string bohm_SPH_dynamic_Mocz_rob_ftwo

variable rnseed index 10
variable number equal ceil(random(1,10000000000,${rnseed})/100000.0)

variable ion_seed equal ${number}
variable e_up_a_seed equal ${number}
variable e_up_b_seed equal ${number}
variable e_down_a_seed equal ${number}
variable e_down_b_seed equal ${number}

# thermostat parameters

variable ion_vel_seed equal ${number}
variable e_down_a_vel_seed equal ${number}
variable e_down_b_vel_seed equal ${number}
variable e_up_a_vel_seed equal ${number}
variable e_up_b_vel_seed equal ${number}

variable i_temp_damping equal ${time_step_length}*100
variable e_temp_damping equal ${time_step_length}*200

variable vel_t equal 1.0*${temptouse}

# rdf calculation

variable rdf_num_bins equal 150
variable rdf_num_measurements equal 100
variable rdf_output_time_step equal 2400
variable rdf_measurement_time_gap equal 10

### Setup simulation

region bounding_region block 0.0 ${box_len} 0.0 ${box_len} 0.0 ${box_len}
timestep ${time_step_length}

create_box 2 bounding_region

create_atoms 1 random ${num_ions} ${ion_seed} NULL
group ion type 1
mass 1 ${ion_amu}
set type 1 charge ${ion_charge}

create_atoms 2 random ${num_electron_elements} ${e_up_a_seed} NULL
group electron type 2
mass 2 ${element_scaled_mass}
set type 2 charge ${element_scaled_charge}

variable tag_ele_start equal ${num_ions}+1

# Ensure ghost atom velocities communicated for SPH Bohm Potential:

comm_modify vel yes

### Dynamic Width fix
variable N_iter equal 2
variable mix_fact equal 1.0
variable type_avoid equal 1 #ensure ions are not included in SPH loops (must match ion type)

# Calculate Bohm potential in fix at end_of_step()
fix ele_dyn_wid electron dynamic_widths_com ${dens_wid_const} ${N_iter} ${mix_fact} ${sigma_start} ${cutoff_SPH} ${box_len} ${type_avoid} ${num_electrons} ${elements_per_electron} ${tag_ele_start} ${pair_name}

pair_style hybrid/overlay ${pair_name} ${cutoff_SPH} ${gamma_factor} coul/long/SPH_nopseudo_ph_sub_thetacut ${cutoff} ${cutoff_SPH} 1.0 ${type_avoid} ${tfwhm} ${elements_per_electron} ${tag_ele_start} sub_minoo ${cutoff_Minoo} ${temptouse} ${electron_amu} ${elements_per_electron} ${tag_ele_start} confine_full ${confine_strength} ${cutoff_Minoo} ${box_len} ${elements_per_electron} ${tag_ele_start} ${num_electron_elements}

# Set up each pair with the correct styles:

pair_coeff * * coul/long/SPH_nopseudo_ph_sub_thetacut

pair_coeff 2 2 ${pair_name}

pair_coeff 2 2 sub_minoo

pair_coeff 2 2 confine_full

# increase number of allowed neighbours
neigh_modify one 10000

# kspace
variable ewalds_parameter equal 3/${cutoff}
kspace_style ewald 1.0e-4
kspace_modify gewald ${ewalds_parameter}

### Thermostatting
fix ion_nvt ion nvt temp ${temptouse} ${temptouse} ${i_temp_damping}

velocity ion create ${temptouse} ${ion_vel_seed} &
rot yes dist gaussian

velocity electron create ${vel_t} ${e_down_a_vel_seed} &
rot yes dist gaussian

compute all_momentum all momentum

fix write_all_momentum all ave/time &
1 1 20 &
c_all_momentum[*] file &
/work4/clf/scarf734/LAMMPS/SPH_Bohm/H_research/21_54eV_1_75_rs/confine_full/${outputdir}/all_momentum.out format %20.16g mode vector

# Randomize the starting positions of all of our particles

displace_atoms all random 0.1 0.1 0.1 42

# Compute group temperatures for output in logfile

compute ion_temp ion temp

compute electron_temp electron temp

# custom logfile output

thermo_style custom step temp c_ion_temp c_electron_temp pe ke etotal press

# Minimize energy

min_style cg
minimize 1.0e-7 1.0e-8 30 30

reset_timestep 0

# Check forces

variable rhi equal 19.36
variable rlo equal 1.001e-2
variable write_N equal 1936

# modify logfile output

thermo_modify lost warn
thermo 5
thermo_style custom step temp c_ion_temp c_electron_temp pe ke etotal press

fix ele_nvt_CoM electron nvt_CoM temp_CoM ${temptouse} ${temptouse} ${e_temp_damping} ${elements_per_electron} ${num_electrons} ${tag_ele_start} ${electron_amu}

run ${block_time_steps}

quit 0
