# Set output directory

variable out_number string target_c

### BACKUP SIMULATION FILES

variable gamma_factor equal 1822.888483

variable outputdir string scarf_e_therm_Z_4_coupling_scan_Nepe_8_${out_number}
shell mkdir /work4/clf/scarf734/LAMMPS/SPH_Bohm/ele_therm_research/coupling_scan/${outputdir}/
shell cp ~/mywork/LAMMPS/fresh-lammps-3Mar20/lammps-3Mar20/ele_therm_research/in.${outputdir} /work4/clf/scarf734/LAMMPS/SPH_Bohm/ele_therm_research/coupling_scan/${outputdir}/
log /work4/clf/scarf734/LAMMPS/SPH_Bohm/ele_therm_research/coupling_scan/${outputdir}/log.${outputdir}

### SYSTEM PARAMETERS:

### physical parameters:

variable temp_eff equal 49.633
variable temp_bulk equal 10.73
variable ion_density equal 0.008928  		# Density in # per bohr^3
variable num_ions equal 500	                                        # Number of ions
variable ion_charge equal 4.0			                                # Average charge/ionization
variable ion_amu equal 26.982	                                # Atomic mass of ion
variable electron_amu equal 0.00054857991                           # Atomic mass of electrons

variable elements_per_electron equal 8

variable element_scaled_mass equal ${electron_amu}/${elements_per_electron}
variable element_scaled_charge equal -1/${elements_per_electron}

variable num_electrons equal ${num_ions}*${ion_charge}
variable num_electron_elements equal ${num_electrons}*${elements_per_electron}
variable half_num_electrons equal ${num_electrons}/2.0
variable quar_num_electrons equal ${half_num_electrons}/2.0
variable temptouse equal 11604.5221*${temp_eff}
variable box_len equal (${num_ions}/${ion_density})^(1/3)
variable half_box_len equal ${box_len}/2.0

variable dens_wid_const equal 1.3

variable kernel_ave equal ${dens_wid_const}*${box_len}/(${num_electron_elements}^(1/3))

variable tfwhm equal 4.70964*${kernel_ave}

variable sigma_start equal ${kernel_ave}                                         # Start global packet width of electrons in bohr

variable therm_scaling equal 2.306757956602289 # temperature scaled by Nepe**(-therm_scaling)

variable tempbulk_kelvin equal 11604.5221*${temp_bulk}/(${elements_per_electron}^(${therm_scaling}))

### simulation parameters:

variable time_step_length equal 0.2e-3
variable equi_time_steps equal 12599
variable block_time_steps equal 1e4 # adjust for real run
variable pos_dump_steps equal 100

variable lores_e_dump_ts_freq equal 200
variable pos_e_dump_ts_freq equal 10
variable cutoff equal 1.2*${tfwhm}
variable cutoff_SPH equal 4.5*${kernel_ave}
variable cutoff_Minoo equal 2.38

units electron                                                      # use electron units (Hartree)
newton on
boundary p p p
atom_style SPH

# Pair style string selection

variable pair_name string bohm_SPH_dynamic_Mocz_rob_ftwo

variable rnseed index 10
variable number equal ceil(random(1,10000000000,${rnseed})/100000.0) # require suffix '-var rnseed $RANDOM'

variable ion_seed equal ${number}
variable e_up_a_seed equal ${number}
variable e_up_b_seed equal ${number}
variable e_down_a_seed equal ${number}
variable e_down_b_seed equal ${number}

# thermostat parameters

variable ion_vel_seed equal ${number}
variable e_down_a_vel_seed equal ${number}
variable e_down_b_vel_seed equal ${number}
variable e_up_a_vel_seed equal ${number}
variable e_up_b_vel_seed equal ${number}

variable i_temp_damping equal ${time_step_length}*100
variable e_temp_damping equal ${time_step_length}*200

# rdf calculation

variable rdf_num_bins equal 150
variable rdf_num_measurements equal 10
variable rdf_output_time_step equal 1000
variable rdf_measurement_time_gap equal 10

### Setup simulation

region bounding_region block 0.0 ${box_len} 0.0 ${box_len} 0.0 ${box_len}

lattice fcc 7.652067996490512

timestep ${time_step_length}

create_box 2 bounding_region

create_atoms 1 region bounding_region
group ion type 1
mass 1 ${ion_amu}
set type 1 charge ${ion_charge}

create_atoms 2 random ${num_electron_elements} ${e_up_a_seed} NULL
group electron type 2
mass 2 ${element_scaled_mass}
set type 2 charge ${element_scaled_charge}

variable tag_ele_start equal ${num_ions}+1

# Ensure ghost atom velocities communicated for SPH Bohm Potential:

comm_modify vel yes

### Dynamic Width fix
variable N_iter equal 4
variable mix_fact equal 1.0
variable type_avoid equal 1 #ensure ions are not included in SPH loops (must match ion type)

# Call dynamic_widths_com to ensure calculation of electron Centres of Mass

fix ele_dyn_wid electron dynamic_widths ${dens_wid_const} ${N_iter} ${mix_fact} ${sigma_start} ${cutoff_SPH} ${type_avoid} ${pair_name}

# to enable all-element interaction in coulomb loop set elements per electron argument to 1

pair_style hybrid/overlay ${pair_name} ${cutoff_SPH} ${gamma_factor} coul/long/SPH_nopseudo_ph_sub ${cutoff} 1.0 1 ${tfwhm} ${elements_per_electron} ${tag_ele_start} sub_minoo ${cutoff_Minoo} ${temptouse} ${electron_amu} ${elements_per_electron} ${tag_ele_start}

# Set up each pair with the correct styles:

pair_coeff * * coul/long/SPH_nopseudo_ph_sub

pair_coeff 2 2 ${pair_name}

pair_coeff 2 2 sub_minoo

# increase number of allowed neighbours
neigh_modify one 10000

# kspace
variable ewalds_parameter equal 3/${cutoff}
kspace_style ewald 1.0e-4
kspace_modify gewald ${ewalds_parameter}

### Thermostatting
fix ele_nvt electron nvt temp ${tempbulk_kelvin} ${tempbulk_kelvin} ${e_temp_damping}
fix ion_nvt ion nvt temp 293.0 293.0 ${i_temp_damping}

velocity ion create 293.0 ${ion_vel_seed} &
rot yes dist gaussian

velocity electron create ${tempbulk_kelvin} ${e_down_a_vel_seed} &
rot yes dist gaussian

# Compute group temperatures for output in logfile

compute ion_temp ion temp

compute electron_temp electron temp

# Compute pair correlation functions:

compute ion_ion_rdf all rdf ${rdf_num_bins} &
1 1

compute ion_electron_rdf all rdf ${rdf_num_bins} &
1 2

compute electron_electron_rdf all rdf ${rdf_num_bins} &
2 2

fix write_ion_ion_rdf all ave/time &
${rdf_measurement_time_gap} ${rdf_num_measurements} ${rdf_output_time_step} &
c_ion_ion_rdf[*] file &
/work4/clf/scarf734/LAMMPS/SPH_Bohm/ele_therm_research/coupling_scan/${outputdir}/ion_ion.rdf mode vector

fix write_ion_electron_rdf all ave/time &
${rdf_measurement_time_gap} ${rdf_num_measurements} ${rdf_output_time_step} &
c_ion_electron_rdf[*] file &
/work4/clf/scarf734/LAMMPS/SPH_Bohm/ele_therm_research/coupling_scan/${outputdir}/ion_electron.rdf mode vector

fix write_electron_electron_rdf all ave/time &
${rdf_measurement_time_gap} ${rdf_num_measurements} ${rdf_output_time_step} &
c_electron_electron_rdf[*] file &
/work4/clf/scarf734/LAMMPS/SPH_Bohm/ele_therm_research/coupling_scan/${outputdir}/electron_electron.rdf mode vector

# custom logfile output

thermo_style custom step temp c_ion_temp c_electron_temp pe ke etotal press

reset_timestep 0

# Check forces

variable rhi equal 19.36
variable rlo equal 1.001e-2
variable write_N equal 1936

# modify logfile output

thermo_modify lost warn
thermo 10
thermo_style custom step temp c_ion_temp c_electron_temp pe ke etotal press

run ${equi_time_steps}

dump pos0 electron custom ${pos_e_dump_ts_freq} /work4/clf/scarf734/LAMMPS/SPH_Bohm/ele_therm_research/coupling_scan/${outputdir}/ele_xyzh_data0.dump id x y z width_SPH
dump pos0b ion xyz ${pos_e_dump_ts_freq} /work4/clf/scarf734/LAMMPS/SPH_Bohm/ele_therm_research/coupling_scan/${outputdir}/ion_xyz_data0.dump

run ${pos_dump_steps}

undump pos0
undump pos0b

unfix ele_nvt
unfix ion_nvt

fix all_nve all nve
fix ele_sample_vel_midrun electron midrun_sample_vel ${elements_per_electron} ${therm_scaling} ${e_down_a_vel_seed}

dump 1 electron custom ${lores_e_dump_ts_freq} /work4/clf/scarf734/LAMMPS/SPH_Bohm/ele_therm_research/coupling_scan/${outputdir}/ele_vels_data.dump id vx vy vz

run ${block_time_steps}

dump pos1 electron custom ${pos_e_dump_ts_freq} /work4/clf/scarf734/LAMMPS/SPH_Bohm/ele_therm_research/coupling_scan/${outputdir}/ele_xyzh_data1.dump id x y z width_SPH

run ${pos_dump_steps}

undump pos1

run ${block_time_steps}

dump pos2 electron custom ${pos_e_dump_ts_freq} /work4/clf/scarf734/LAMMPS/SPH_Bohm/ele_therm_research/coupling_scan/${outputdir}/ele_xyzh_data2.dump id x y z width_SPH

run ${pos_dump_steps}

undump pos2

run ${block_time_steps}

dump pos3 electron custom ${pos_e_dump_ts_freq} /work4/clf/scarf734/LAMMPS/SPH_Bohm/ele_therm_research/coupling_scan/${outputdir}/ele_xyzh_data3.dump id x y z width_SPH

run ${pos_dump_steps}

undump pos3

run ${block_time_steps}

dump pos4 electron custom ${pos_e_dump_ts_freq} /work4/clf/scarf734/LAMMPS/SPH_Bohm/ele_therm_research/coupling_scan/${outputdir}/ele_xyzh_data4.dump id x y z width_SPH

run ${pos_dump_steps}

undump pos4

run ${block_time_steps}

dump pos5 electron custom ${pos_e_dump_ts_freq} /work4/clf/scarf734/LAMMPS/SPH_Bohm/ele_therm_research/coupling_scan/${outputdir}/ele_xyzh_data5.dump id x y z width_SPH

run ${pos_dump_steps}

undump pos5

run ${block_time_steps}

dump pos6 electron custom ${pos_e_dump_ts_freq} /work4/clf/scarf734/LAMMPS/SPH_Bohm/ele_therm_research/coupling_scan/${outputdir}/ele_xyzh_data6.dump id x y z width_SPH

run ${pos_dump_steps}

undump pos6

run ${block_time_steps}

dump pos7 electron custom ${pos_e_dump_ts_freq} /work4/clf/scarf734/LAMMPS/SPH_Bohm/ele_therm_research/coupling_scan/${outputdir}/ele_xyzh_data7.dump id x y z width_SPH

run ${pos_dump_steps}

undump pos7

run ${block_time_steps}

dump pos8 electron custom ${pos_e_dump_ts_freq} /work4/clf/scarf734/LAMMPS/SPH_Bohm/ele_therm_research/coupling_scan/${outputdir}/ele_xyzh_data8.dump id x y z width_SPH

run ${pos_dump_steps}

undump pos8

run ${block_time_steps}

dump pos9 electron custom ${pos_e_dump_ts_freq} /work4/clf/scarf734/LAMMPS/SPH_Bohm/ele_therm_research/coupling_scan/${outputdir}/ele_xyzh_data9.dump id x y z width_SPH

run ${pos_dump_steps}

undump pos9

run ${block_time_steps}

dump pos10 electron custom ${pos_e_dump_ts_freq} /work4/clf/scarf734/LAMMPS/SPH_Bohm/ele_therm_research/coupling_scan/${outputdir}/ele_xyzh_data10.dump id x y z width_SPH

run ${pos_dump_steps}

undump pos10

undump 1

quit 0
